new XfmrCode.DEFAULT_25-26 Phases=2 Windings=2 Conns=(wye, wye) kVs=[4.1568, 4.1568] kVAs=[45.0, 45.0] Taps=[1.00625, 1.00625] %Rs=[0.1, 0.1] %LoadLoss=0.0 %NoLoadLoss=0.0 X12=1.0 Wdg=1 MaxTap=1.1 MinTap=0.9 NumTaps=32 Wdg=2 MaxTap=1.1 MinTap=0.9 NumTaps=32
new Transformer.25-26_1 Phases=2 Windings=2 Buses=(26_0_1.1.3, 26.1.3) XfmrCode=DEFAULT_25-26 Enabled=True
new XfmrCode.NON-REVERSIBLE_9-14 Phases=1 Windings=2 Conns=(wye, wye) kVs=[2.4, 2.4] kVAs=[250.0, 250.0] Taps=[0.9875, 0.9875] %Rs=[0.1, 0.1] %LoadLoss=0.0 %NoLoadLoss=0.0 X12=1.0 Wdg=1 MaxTap=1.1 MinTap=0.9 NumTaps=32 Wdg=2 MaxTap=1.1 MinTap=0.9 NumTaps=32
new Transformer.9-14_1 Phases=1 Windings=2 Buses=(14_0_2.1, 14.1) XfmrCode=NON-REVERSIBLE_9-14 Enabled=True
new XfmrCode.DEFAULT_160-67 Phases=3 Windings=2 Conns=(wye, wye) kVs=[4.1568, 4.1568] kVAs=[45.0, 45.0] Taps=[1.04375, 1.04375] %Rs=[0.1, 0.1] %LoadLoss=0.0 %NoLoadLoss=0.0 X12=1.0 Wdg=1 MaxTap=1.1 MinTap=0.9 NumTaps=32 Wdg=2 MaxTap=1.1 MinTap=0.9 NumTaps=32
new Transformer.160-67_1 Phases=3 Windings=2 Buses=(67_0_3.1.2.3, 67.1.2.3) XfmrCode=DEFAULT_160-67 Enabled=True
new XfmrCode.REGULATOR_150_149_150-149 Phases=3 Windings=2 Conns=(wye, wye) kVs=[4.1568, 4.1568] kVAs=[135.0, 135.0] Taps=[1.0375, 1.0375] %Rs=[0.1, 0.1] %LoadLoss=0.0 %NoLoadLoss=0.0 X12=1.0 Wdg=1 MaxTap=1.1 MinTap=0.9 NumTaps=32 Wdg=2 MaxTap=1.1 MinTap=0.9 NumTaps=32
new Transformer.150-149_1 Phases=3 Windings=2 Buses=(149_0_4.1.2.3, 149.1.2.3) XfmrCode=REGULATOR_150_149_150-149 Enabled=True
new XfmrCode.XFM-1 Phases=3 Windings=2 Conns=(delta, delta) kVs=[4.16, 0.48] kVAs=[150.0, 150.0] Taps=[1.0, 1.0] %Rs=[0.6349999583803946, 0.6349999583803946] %LoadLoss=0.6349999583803945 %NoLoadLoss=0.0 X12=2.720000096723876 Wdg=1 MaxTap=1.1 MinTap=0.9 NumTaps=32 Wdg=2 MaxTap=1.1 MinTap=0.9 NumTaps=32
new Transformer.61-610_1 Phases=3 Windings=2 Buses=(61_primary.1.2.3, 610.1.2.3) XfmrCode=XFM-1 Enabled=True
